*Heading
** Job name: 777 Model name: Model-1
** Generated by: Abaqus/CAE 6.14-1
*Preprint, echo=NO, model=NO, history=NO, contact=NO
**
** PARTS
**
*Part, name=Part-1
*Node
      1,         150.,         100.,          10.
      2,         150.,          99.,          10.
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*Element, type=C3D8
   1,  232,  233,  254,  253,    1,    2,   23,   22
   2,  233,  234,  255,  254,    2,    3,   24,   23
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*Nset, nset=Set-1, generate
    1,  9471,     1
*Elset, elset=Set-1, generate
    1,  8000,     1
*Orientation, name=Ori-1
1., 0., 0., 0., 1., 0.
1, 0.
** Section: Section-1
*Solid Section, elset=Set-1, orientation=Ori-1, material=Material-1
,
*End Part
**
**
** ASSEMBLY
**
*Assembly, name=Assembly
**
*Instance, name=Part-1-1, part=Part-1
*End Instance
**
*Nset, nset=Set-1, instance=Part-1-1
 9241, 9261
*Nset, nset=Set-2, instance=Part-1-1
  211,  212,  213,  214,  215,  216
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*Elset, elset=Set-2, instance=Part-1-1
  181,  182,  183,  184,  185,  186
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*Nset, nset=Set-3, instance=Part-1-1
 231,
*End Assembly
**
** MATERIALS
**
*Material, name=Material-1
*Depvar
      7,
*Elastic, dependencies=3, type=ANISOTROPIC
     102639.,      4398.83,      11177.5,      4398.83,      3485.22,      11177.5,           0.,           0.
           0.,        3000.,           0.,           0.,           0.,           0.,        3000.,           0.
           0.,           0.,           0.,           0.,      3846.15, ,        1e-06,           0.
        -180.,
 1.02639e+11,  4.39883e+09,  1.11775e+10,  4.39883e+09,  3.48522e+09,  1.11775e+10,           0.,           0.
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         180.,
*User Defined Field
**
** BOUNDARY CONDITIONS
**
** Name: BC-1 Type: Displacement/Rotation
*Boundary
Set-1, 1, 1
Set-1, 2, 2
Set-1, 3, 3
** Name: BC-2 Type: Displacement/Rotation
*Boundary
Set-2, 3, 3
** ----------------------------------------------------------------
**
** STEP: Step-1
**
*Step, name=Step-1, nlgeom=NO
*Static, direct
1., 1.,
**
** LOADS
**
** Name: Load-1   Type: Concentrated force
*Cload
Set-3, 2, -100000.
**
** OUTPUT REQUESTS
**
*Restart, write, frequency=0
**
** FIELD OUTPUT: F-Output-1
**
*Output, field
*Node Output
U,
*Element Output, directions=YES
FV, S, SDV
**
** HISTORY OUTPUT: H-Output-1
**
*Output, history, variable=PRESELECT
*End Step
** ----------------------------------------------------------------
**
** STEP: Step-2
**
*Step, name=Step-2, nlgeom=NO, inc=10000
*Static, direct
1., 2000.,
**
** OUTPUT REQUESTS
**
*Restart, write, frequency=0
**
** FIELD OUTPUT: F-Output-1
**
*Output, field
*Element Output, directions=YES
FV, SDV
**
** HISTORY OUTPUT: H-Output-1
**
*Output, history, variable=PRESELECT
*EL FILE
S, SDV, E
IVOL
*End Step
